[cos0, -sin0, 0, 0; sin0, cos0, 0, 0; 0, 0, 1, 0; 0, 0, 0, 1]*[a1, b1, 0, 0; b1, a2, b2, 0; 0, b2, a3, b3; 0, 0, b3, a4]*[cos0, sin0, 0, 0; -sin0, cos0, 0, 0; 0, 0, 1, 0; 0, 0, 0, 1] simplify → [
    a1*cos0^2 - 2*b1*cos0*sin0 + a2*sin0^2, b1*cos0^2 - b1*sin0^2 + a1*cos0*sin0 - a2*cos0*sin0, -b2*sin0, 0;
    b1*cos0^2 - b1*sin0^2 + a1*cos0*sin0 - a2*cos0*sin0, a2*cos0^2 + 2*b1*cos0*sin0 + a1*sin0^2, b2*cos0, 0;
    -b2*sin0, b2*cos0, a3, b3;
    0, 0, b3, a4
]
[1, 0, 0, 0, 0; 0, cos1, -sin1, 0, 0; 0, sin1, cos1, 0, 0; 0, 0, 0, 1, 0; 0, 0, 0, 0, 1]*[a1, b1, P, 0, 0; b1, a2, b2, 0, 0; P, b2, a3, b3, 0; 0, 0, b3, a4, b4; 0, 0, 0, b4, a5]*[1, 0, 0, 0, 0; 0, cos1, sin1, 0, 0; 0, -sin1, cos1, 0, 0; 0, 0, 0, 1, 0; 0, 0, 0, 0, 1] simplify → [
    a1, b1*cos1 - P*sin1, P*cos1 + b1*sin1, 0, 0;
    b1*cos1 - P*sin1, a2*cos1^2 - 2*b2*cos1*sin1 + a3*sin1^2, b2*cos1^2 - b2*sin1^2 + a2*cos1*sin1 - a3*cos1*sin1, -b3*sin1, 0;
    P*cos1 + b1*sin1, b2*cos1^2 - b2*sin1^2 + a2*cos1*sin1 - a3*cos1*sin1, a3*cos1^2 + 2*b2*cos1*sin1 + a2*sin1^2, b3*cos1, 0;
    0, -b3*sin1, b3*cos1, a4, b4;
    0, 0, 0, b4, a5
]
[
    1, 0, 0, 0, 0, 0;
    0, 1, 0, 0, 0, 0;
    0, 0, cos2, -sin2, 0, 0;
    0, 0, sin2, cos2, 0, 0;
    0, 0, 0, 0, 1, 0;
    0, 0, 0, 0, 0, 1
]*[
    a1, b1, 0, 0, 0, 0;
    b1, a2, b2, P, 0, 0;
    0, b2, a3, b3, 0, 0;
    0, P, b3, a4, b4, 0;
    0, 0, 0, b4, a5, b5;
    0, 0, 0, 0, b5, a6
]*[
    1, 0, 0, 0, 0, 0;
    0, 1, 0, 0, 0, 0;
    0, 0, cos2, sin2, 0, 0;
    0, 0, -sin2, cos2, 0, 0;
    0, 0, 0, 0, 1, 0;
    0, 0, 0, 0, 0, 1
] simplify → [
    a1, b1, 0, 0, 0, 0;
    b1, a2, b2*cos2 - P*sin2, P*cos2 + b2*sin2, 0, 0;
    0, b2*cos2 - P*sin2, a3*cos2^2 - 2*b3*cos2*sin2 + a4*sin2^2, b3*cos2^2 - b3*sin2^2 + a3*cos2*sin2 - a4*cos2*sin2, -b4*sin2, 0;
    0, P*cos2 + b2*sin2, b3*cos2^2 - b3*sin2^2 + a3*cos2*sin2 - a4*cos2*sin2, a4*cos2^2 + 2*b3*cos2*sin2 + a3*sin2^2, b4*cos2, 0;
    0, 0, -b4*sin2, b4*cos2, a5, b5;
    0, 0, 0, 0, b5, a6
]
[
    1, 0, 0, 0, 0, 0;
    0, 1, 0, 0, 0, 0;
    0, 0, 1, 0, 0, 0;
    0, 0, 0, 1, 0, 0;
    0, 0, 0, 0, cosN, -sinN;
    0, 0, 0, 0, sinN, cosN
]*[
    1, 1, 0, 0, 0, 0;
    1, 1, 1, 0, 0, 0;
    0, 1, 1, b3, 0, 0;
    0, 0, b3, a1, b1, P;
    0, 0, 0, b1, a2, b2;
    0, 0, 0, P, b2, a3
]*[
    1, 0, 0, 0, 0, 0;
    0, 1, 0, 0, 0, 0;
    0, 0, 1, 0, 0, 0;
    0, 0, 0, 1, 0, 0;
    0, 0, 0, 0, cosN, sinN;
    0, 0, 0, 0, -sinN, cosN
] simplify → [
    1, 1, 0, 0, 0, 0;
    1, 1, 1, 0, 0, 0;
    0, 1, 1, b3, 0, 0;
    0, 0, b3, a1, b1*cosN - P*sinN, P*cosN + b1*sinN;
    0, 0, 0, b1*cosN - P*sinN, a2*cosN^2 - 2*b2*cosN*sinN + a3*sinN^2, b2*cosN^2 - b2*sinN^2 + a2*cosN*sinN - a3*cosN*sinN;
    0, 0, 0, P*cosN + b1*sinN, b2*cosN^2 - b2*sinN^2 + a2*cosN*sinN - a3*cosN*sinN, a3*cosN^2 + 2*b2*cosN*sinN + a2*sinN^2
]
